// COMSOL Multiphysics 6.0.0.354 model "oil_spreading_instantaneous_spill.mph"
// Outline of the model tree

Parameters
  r_i = 36.63[m]
  a = 2*pi/3/Volume*(2*gamma/g_prime/density_o)^(1/2)
  Volume = 200[m^3]
  gamma = 0.00001 [kg/s^2]  // surface tension parameter
  g_prime = (density_w-density_o)/density_o*gravity
  density_w = 1025[kg/m^3]
  density_o = 890 [kg/m^3]
  gravity = 9.81 [m/s^2]
  k = 0.003 [kg/m^2/s]
  time = 0.1 [s]
  function_value = r_i^2-1/a*atan(a*r_i^2)-4*gamma/k*time

Variables
  var1 "Variables 1"
    h_max = comp1.at0(300,300,h)
    c_coeff = (g_prime*density_o/k+2*gamma/k/h_max^2)*h^2

Probes
  dom1: Domain "Domain Probe 1" on all domains
    type = maximum
    probename = hmax
    expr = h
    unit = m
    descr = Dependent variable h
    table = tbl1

Geometry
  geom1 "Geometry 1" (2D, length unit m)
    sq1: Square | size = 600
    c1: Circle | pos = {300, 300}; r = r_i
    sq2: Square | size = 300
    sq3: Square | pos = {300, 0}; size = 300
    sq4: Square | pos = {0, 300}; size = 300
    sq5: Square | pos = {300, 300}; size = 300
    fin: Finalize "Form Union"

Physics
  c: CoefficientFormPDE on all domains
    dependent variable h
    Units.DependentVariableQuantity = none
    Units.CustomSourceTermUnit = m/s
    cfeq1: CoefficientFormPDE (default) | c = {c_coeff, 0, 0, c_coeff}; f = 0; da = 1
    zflx1: ZeroFluxBoundary "Zero Flux 1" (default)
    init1: init "Initial Values 1" (default) | h = Volume/pi/r_i^2
    init2: init "Initial Values 2" on domains 1, 2, 5, 8
    dir1: DirichletBoundary "Dirichlet Boundary Condition 1" on boundaries 1-3, 5, 8, 13, 15, 16 | r = 0
  ge: GlobalEquations "Global ODEs and DAEs"
    ge1: GlobalEquations
      name = radius_initial
      equation = radius_initial^2-1/a*atan(a*radius_initial^2)-4*gamma/k*time
      initialValueU = 10
      valueType = complex
      DependentVariableQuantity = none
      CustomDependentVariableUnit = m
      SourceTermQuantity = none
      CustomSourceTermUnit = m^2

Mesh
  mesh1 "Mesh 1" (physics-controlled)
    size: MeshSizeDefault | hauto = 2

Studies
  std1 "Study 1"
    stat: Stationary | solve for = {ge}
  std2 "Study 2"
    time: Transient "Time Dependent" | tunit = min; tlist = range(0,0.1,18); solve for = {c}

Solver configurations
  sol1 "Solution 1" (study std1)
    v1: Variables "Dependent Variables 1"
    s1: Stationary "Stationary Solver 1"
      dDef: Direct
      fc1: FullyCoupled
  sol2 "Solution 2" (study std2)
    v1: Variables "Dependent Variables 1"
    t1: Time "Time-Dependent Solver 1" | tunit = min; tlist = range(0,0.1,18)
      dDef: Direct
      fc1: FullyCoupled

Datasets
  dset1: Solution | solution = sol1
  dset2: Solution | solution = sol2
  dset3: Solution "Probe Solution 3" | solution = sol2
  max1: Maximum "Domain Probe 1" on domains 1-8 | data = dset3
  cln1: CutLine2D | data = dset2; genpoints = {{300, 300}, {300, 600}}

Derived values
  pev1: EvalPoint "Domain Probe 1"
    data = max1
    table = tbl1
    expr = h
    descr = {Dependent variable h, Dependent variable R}

Evaluation groups
  eg1: EvaluationGroup | data = dset1
    gev1: EvalGlobal "Global Evaluation 1"
      expr = {radius_initial, r_i^2-1/a*atan(a*r_i^2)-4*gamma/k*time}
      unit = {m, m^2}
      descr = {State variable radius_initial, function_value}

Tables
  tbl1: Table "Probe Table 1"
    Time (min) | Dependent variable h (m), Domain Probe 1
    0 | 0.0490769
    1.092e-05 | 0.0486536
    2.184e-05 | 0.0482527
    4.368e-05 | 0.0476504
    8.73601e-05 | 0.0476284
    0.00013104 | 0.0475429
    0.00017472 | 0.0475098
    0.00026208 | 0.0474481
    0.00034944 | 0.0474466
    0.0004368 | 0.047446
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
Plots
  pg1: PlotGroup2D "2D Plot Group 1" | data = dset2
    surf1: Surface | expr = h
    surf2: Surface (disabled) | expr = maxop1(u2)
  pg2: PlotGroup2D "2D Plot Group 2" | data = dset2
    surf1: Surface | expr = h
  pg3: PlotGroup1D "Probe Plot Group 3"
    tblp1: Table "Probe Table Graph 1" | table = tbl1
  pg4: PlotGroup1D "1D Plot Group 4" | data = cln1
    lngr1: LineGraph | expr = h